<?xml version="1.0"?>
<?xml-stylesheet type="text/xsl" href="http://jsbsim.sourceforge.net/JSBSim.xsl"?>
<fdm_config name="F-4S" version="2.0" release="ALPHA"
   xmlns:xsi="http://www.w3.org/2001/XMLSchema-instance"
   xsi:noNamespaceSchemaLocation="http://jsbsim.sourceforge.net/JSBSim.xsd">

 <fileheader>
  <author> Matthew Anderson </author>
  <filecreationdate>2017-10-08</filecreationdate>
  <version>$Revision: 1.20 $</version>
  <description> Models a F-4S. </description>
 </fileheader>

 <metrics>
   <wingarea  unit="FT2">  538.34 </wingarea>
   <wingspan  unit="FT" >   38.41 </wingspan>
   <wing_incidence>          1.00 </wing_incidence>
   <chord     unit="FT" >   16.04 </chord>
   <htailarea unit="FT2">   94.70 </htailarea>
   <htailarm  unit="FT" >   17.70 </htailarm>
   <vtailarea unit="FT2">   67.50 </vtailarea>
   <vtailarm  unit="FT" >    6.38 </vtailarm>

   <!-- 5% MAC behind CG -->
   <location name="AERORP" unit="M">
     <x>   8.88  </x>
     <y>   0.00 </y>
     <z>   0.00 </z>
   </location>
   <location name="EYEPOINT" unit="M">
     <x>   3.92196 </x>
     <y>   0.00 </y>
     <z>  0.54 </z>
   </location>
   <location name="VRP" unit="M">
     <x>9.04</x>
     <y>0</y>
     <z>0</z>
   </location>
 </metrics>

 <mass_balance>

   <!-- Reference: ADA101648, page 19 -->
   <ixx unit="SLUG*FT2">     23850 </ixx>
   <iyy unit="SLUG*FT2">    127400 </iyy>
   <izz unit="SLUG*FT2">    146000 </izz>
   <ixz unit="SLUG*FT2">    2210   </ixz>
   <!-- End Reference -->
   <emptywt unit="LBS" >     30770 </emptywt>
   <location name="CG" unit="M">
     <x> 8.78 </x>
     <y> 0.00 </y>
     <z> 0.00 </z>
   </location>
  </mass_balance>

<ground_reactions file="Systems/GroundReactions.xml"/>

<propulsion file="Systems/Propulsion"/>

<system file="FCS"/>
<system file="Systems/BLC.xml"/>
<system file="Systems/Slats.xml"/>
<system file="Systems/Refueling.xml"/>
<system file="Systems/Stores.xml"/>
<system file="Systems/SpinRecovery.xml"/>
<system file="Systems/LandingDistance.xml"/>
<system file="Systems/Avionics.xml"/>
<flight_control name="none"/>

 <aerodynamics>

     <!-- alpha absolute value -->
     <function name="aero/alpha-deg-abs">
         <abs> <p> aero/alpha-deg </p> </abs>
    </function>

    <function name="aero/beta-deg-abs">
      <abs> <p> aero/beta-deg </p> </abs>
    </function>

    <!-- Lift Tables -->

    <!-- Reference: ADA101648, page 25 for positive AoA including 0-->
    <function name="aero/coefficient/CL/CL_BASIC">
      <description>CL_BASIC</description>
      <product>
          <!-- Apply a simple Prandtl-Glauert style compressibility correction factor (table-based, saturated) -->
          <property>aero/comp/pg</property>
          <property>aero/qbar-psf</property>
          <property>metrics/Sw-sqft</property>
          <sum>
            <ifthen>
              <le> <p> aero/alpha-deg </p> <v> 0 </v> </le>
              <product>
                <v> 0.122 </v><!-- CL_basic at 0 deg alpha -->
                <v> 2 </v>
              </product>
              <v>0</v>
            </ifthen>
            <product>
              <ifthen>
                <le> <p> aero/alpha-deg </p> <v> 0 </v> </le>
                <v> -1.00 </v>
                <v> 1.00 </v>
              </ifthen>
              <table>
                <independentVar lookup="row">aero/alpha-deg-abs</independentVar>
                <tableData>
          		    0     0.122
          		    5     0.4146
          		    10    0.6834
          		    15    0.9053
          		    20    0.9396
          		    25    1.010
          		    30    1.067
          		    35    1.049
          		    40    1.024
          		    45    0.969
          		    50    0.927
          		    55    0.872
          		    60    0.798
          		    65    0.677
          		    70    0.546
          		    75    0.418
          		    80    0.289
          		    85    0.157
          		    90    0.025
          		    95   -0.116
          		    100  -0.257
          		    105  -0.402
          		    110  -0.547
                            180  -0.547
                </tableData>
              </table>
            </product>
          </sum>
      </product>
     </function>

    <function name="aero/coefficient/CL/Lift_flap">
      <description>Delta Lift due to flaps, with BLC logic</description>
        <!-- Flap lift with BLC -->
        <ifthen>
          <eq><property>fcs/blc-active</property><value>1</value></eq>
          <product>
            <property>aero/qbar-psf</property>
            <property>metrics/Sw-sqft</property>
            <property>fcs/flap-pos-deg</property>
            <value>0.013</value> <!-- Higher CL per deg with BLC -->
          </product>
          <!-- Flap lift without BLC -->
          <product>
            <property>aero/qbar-psf</property>
            <property>metrics/Sw-sqft</property>
            <property>fcs/flap-pos-deg</property>
            <value>0.007</value> <!-- Lower CL per deg without BLC -->
          </product>
        </ifthen>
    </function>

    <function name="aero/coefficient/CL/Lift_BLC">
	<description>Delta Lift due to Boundary Layer Control</description>
	<product>
		<property>aero/qbar-psf</property>
		<property>metrics/Sw-sqft</property>
		<property>fcs/blc-active</property>
		<value> 0.024 </value>
	</product>
    </function>

    <function name="aero/coefficient/CL/Lift_Slats">
	<description>Delta Lift due to Leading Edge Slats (F-4E/S passive system)</description>
	<product>
		<property>aero/qbar-psf</property>
		<property>metrics/Sw-sqft</property>
		<property>fcs/slats-lift-delta</property>
	</product>
    </function>


    <function name="aero/coefficient/CL/Lift_speedbrake">
       <description>Delta Lift due to speedbrake</description>
       <product>
           <property>aero/qbar-psf</property>
           <property>metrics/Sw-sqft</property>
           <property>fcs/speedbrake-pos-norm</property>
           <value>0</value>
       </product>
    </function>


    <!-- Reference: ADA101648, page 25 -->
    <function name="aero/coefficient/CL/CL_STAB">
       <description>CL_STAB</description>
       <product>
         <property>aero/qbar-psf</property>
         <property>metrics/Sw-sqft</property>
	       <property>fcs/elevator-deg</property>
	       <table>
		     <independentVar lookup="row">aero/alpha-deg-abs</independentVar>
		     <tableData>
    			0     0.00699
    			5     0.00694
    			10    0.00676
    			15    0.00637
    			20    0.00571
    			25    0.00513
    			30    0.00503
    			35    0.00486
    			40    0.00463
    			45    0.00438
    			50    0.00416
    			55    0.00393
    			60    0.00371
    			65    0.00348
    			70    0.00324
    			75    0.00300
    			80    0.00300
    			85    0.00300
    			90    0.00300
    			95    0.00300
    			100   0.00300
    			105   0.00300
    			110   0.00300
                        180   0.00300
		      </tableData>
	       </table>
       </product>
    </function>


  <!-- Drag tables -->

  <!-- Reference: ADA101648 page 25 -->
    <function name="aero/coefficient/CD/CD_BASIC">
       <description>Basic drag</description>
       <product>
          <property>aero/qbar-psf</property>
          <property>metrics/Sw-sqft</property>
          <table>
            <independentVar lookup="row">aero/alpha-deg-abs</independentVar>
             <tableData>
              		0    0.035
              		5    0.066
              		10   0.130
              		15   0.247
              		20   0.382
              		25   0.510
              		30   0.655
              		35   0.786
              		40   0.911
              		45   1.011
              		50   1.128
              		55   1.245
              		60   1.352
              		65   1.405
              		70   1.451
              		75   1.493
              		80   1.523
              		85   1.542
              		90   1.570
              		95   1.585
              		100  1.600
              		105  1.583
              		110  1.567
                        180  1.567
          	</tableData>
          </table>
       </product>
    </function>

    <function name="aero/coefficient/CD/CD_Stores">
        <description>Drag due to external stores configuration</description>
        <property>fcs/stores-drag-delta</property>
    </function>

    <function name="aero/coefficient/CD/CDM">
       <description>Drag due to mach</description>
        <product>
          <property>aero/qbar-psf</property>
          <property>metrics/Sw-sqft</property>
          <table>
            <independentVar lookup="row">velocities/mach</independentVar>
            <tableData>
                0.00      0.000
                0.81      0.0008
                1.00      0.0026
                1.20      0.0017
                2.5       0.0010
            </tableData>
          </table>
        </product>
    </function>

    <function name="aero/coefficient/CD/CDDF">
       <description>Drag due to flaps</description>
         <product>
           <property>aero/qbar-psf</property>
           <property>metrics/Sw-sqft</property>
           <property>fcs/flap-pos-deg</property>
           <value> 0.00250 </value>
         </product>
    </function>

    <function name="aero/coefficient/CD/Drag_gear">
       <description>Drag due to gear</description>
         <product>
           <property>aero/qbar-psf</property>
           <property>metrics/Sw-sqft</property>
           <property>gear/gear-pos-norm</property>
           <value>0.02</value>
         </product>
    </function>

    <function name="aero/coefficient/CD/Drag_speedbrake">
       <description>Drag due to speedbrakes</description>
         <product>
           <property>aero/qbar-psf</property>
           <property>metrics/Sw-sqft</property>
           <property>fcs/speedbrake-pos-norm</property>
           <value>0.024</value>
         </product>
    </function>

    <function name="aero/coefficient/CD/Drag_Slats">
       <description>Drag due to Leading Edge Slats deployment</description>
       <product>
           <property>aero/qbar-psf</property>
           <property>metrics/Sw-sqft</property>
           <property>fcs/slats-drag-delta</property>
       </product>
    </function>

    <function name="aero/coefficient/CD/CD_STAB">
       <description>Drag due to Elevator Deflection</description>
       <product>
           <property>aero/qbar-psf</property>
           <property>metrics/Sw-sqft</property>
           <value>0.04</value>
           <abs><property>fcs/elevator-deg</property></abs>
       </product>
    </function>


    <!-- Sideforce Tables -->

  <!-- Reference: ADA101648, page 25-->
    <function name="aero/coefficient/CY/CYB">
       <description>CY_B</description>
       <product>
           <property>aero/qbar-psf</property>
           <property>metrics/Sw-sqft</property>
           <table>
		   <independentVar lookup="row">aero/alpha-deg-abs</independentVar>
                <tableData>
		            0   -0.011
                5   -0.011
                10  -0.011
                15  -0.011
                20  -0.011
                25  -0.011
                30  -0.011
                35  -0.0092
                40  -0.0079
                45  -0.0065
                50  -0.0050
                55  -0.0036
                60  -0.0023
                65  -0.0008
                70   0.0006
                75   0.0020
                80   0.0030
                85   0.0030
                90   0.0030
                95   0.0030
                100  0.0030
                110  0.0030
                180  0.0030
                </tableData>
           </table>
       </product>
    </function>

    <!-- Reference: ADA101648, page 17 -->
    <function name="aero/coefficient/CY/CYDA">
        <description>Cy due to aileron position, this is a constant</description>
        <product>
            <property>aero/qbar-psf</property>
            <property>metrics/Sw-sqft</property>
            <value>-0.000167</value>
            <property>fcs/aileron-deg</property>
        </product>
    </function>

    <!-- Reference: ADA101648, page 17 -->
    <function name="aero/coefficient/CY/CYDSP">
        <description>Cy due to spoiler position</description>
        <product>
            <property>aero/qbar-psf</property>
            <property>metrics/Sw-sqft</property>
            <value>-0.00006</value>
            <property>fcs/spoiler-deg</property>
        </product>
    </function>

    <!-- Reference: ADA101648, page 25 -->
    <function name="aero/coefficient/CY/CYDR">
        <description>Cy due to rudder position</description>
        <product>
            <property>aero/qbar-psf</property>
            <property>metrics/Sw-sqft</property>
            <property>fcs/rudder-deg</property>
            <table>
                <independentVar lookup="row">aero/alpha-deg-abs</independentVar>
                <tableData>
                    0   0.00151
                    5   0.00142
                    10  0.00134
                    15  0.00130
                    20  0.00124
                    25  0.00098
                    30  0.00073
                    35  0.00048
                    40  0.00024
                    45  0.00000
                    180 0.00000
                </tableData>
            </table>
        </product>
    </function>


    <!-- Roll Tables -->

     <!-- Reference: ADA101648, page 25 -->
    <function name="aero/coefficient/CR/CRB1">
       <description>Roll moment -- beta #1</description>
       <product>
           <property>aero/qbar-psf</property>
           <property>metrics/Sw-sqft</property>
           <property>metrics/bw-ft</property>
	   <table>
		   <independentVar lookup="row">aero/alpha-deg-abs</independentVar>
           <tableData>
             0   -0.00132
             5   -0.00175
             10  -0.00236
             15  -0.00219
             20  -0.00118
             25  -0.00006
             30  -0.00025
             35  -0.00010
             40  -0.00108
             45  -0.00180
             50  -0.00232
             55  -0.00241
             60  -0.00255
             65  -0.00268
             70  -0.00279
             75  -0.00291
             80  -0.00300
             85  -0.00300
             90  -0.00300
             95  -0.00300
             100 -0.00300
             105 -0.00300
             110 -0.00300
             180 -0.00300
           </tableData>
	   </table>
    </product>
   </function>

    <!-- Reference: ADA101648, page 25 -->
   <function name="aero/coefficient/CR/CRB2">
       <description>Roll moment -- beta #2</description>
       <product>
           <property>aero/qbar-psf</property>
           <property>metrics/Sw-sqft</property>
           <property>metrics/bw-ft</property>
           <table>
               <independentVar lookup="row">aero/alpha-deg-abs</independentVar>
               <tableData>
                   0  -0.00132
                   5  -0.00175
                   10 -0.00236
                   15 -0.00219
                   20 -0.00219
                   25 -0.00219
                   30 -0.00219
                   35 -0.00185
                   40 -0.00152
                   45 -0.00180
                   50 -0.00222
                   55 -0.00241
                   60 -0.00255
                   65 -0.00268
                   70 -0.00279
                   75 -0.00291
                   80 -0.00300
                   85 -0.00300
                   90 -0.00300
                   95 -0.00300
                   100 -0.00300
                   105 -0.00300
                   110 -0.00300
                   180 -0.00300
               </tableData>
           </table>
      </product>
  </function>


    <!-- Reference: ADA101648, page 25 -->
    <function name="aero/coefficient/CR/CRP1">
       <description>Roll moment due to roll rate</description>
       <product>
           <property>aero/qbar-psf</property>
           <property>metrics/Sw-sqft</property>
           <property>metrics/bw-ft</property>
           <property>aero/bi2vel</property>
           <property>velocities/p-aero-rad_sec</property>
           <table>
               <independentVar lookup="row">aero/alpha-deg-abs</independentVar>
               <tableData>
                   0   -0.304
                   5   -0.300
                   10  -0.255
                   15  -0.102
                   20  -0.100
                   25  -0.280
                   30  -0.304
                   35  -0.250
                   40  -0.164
                   45  -0.100
                   180 -0.100
               </tableData>
           </table>
       </product>
    </function>

    <!-- Reference: ADA101648, page 25 -->
    <function name="aero/coefficient/CR/CRP2">
        <description>Roll moment due to roll rate #2</description>
        <product>
            <property>aero/qbar-psf</property>
            <property>metrics/Sw-sqft</property>
            <property>metrics/bw-ft</property>
            <property>aero/bi2vel</property>
            <property>velocities/p-aero-rad_sec</property>
            <table>
                <independentVar lookup="row">aero/alpha-deg-abs</independentVar>
                <tableData>
                    0  -0.304
                    5  -0.300
                    10 -0.260
                    15 -0.260
                    20 -0.260
                    25 -0.260
                    30 -0.260
                    35 -0.250
                    40 -0.164
                    45 -0.100
                    180 -0.100
                </tableData>
            </table>
        </product>
    </function>

    <!-- Reference: ADA101648, page 26 -->
    <function name="aero/coefficient/CR/CRR">
       <description>Roll moment due to yaw rate</description>
       <product>
           <property>aero/qbar-psf</property>
           <property>metrics/Sw-sqft</property>
           <property>metrics/bw-ft</property>
           <property>aero/bi2vel</property>
           <property>velocities/r-aero-rad_sec</property>
           <table>
               <independentVar lookup="row">aero/alpha-deg-abs</independentVar>
               <tableData>
                   0   0.046
                   5   0.076
                   10  0.108
                   15  0.170
                   20  0.318
                   25  0.387
                   30  0.341
                   35  0.204
                   40  0.085
                   45  0.050
                   180 0.050
               </tableData>
           </table>
       </product>
    </function>

	<!-- Reference: ADA101648, page 26 -->
	<function name="aero/coefficient/CR/CRDA">
		<description>CRDA (aileron position)</description>
		<product>
			<property>aero/qbar-psf</property>
			<property>metrics/Sw-sqft</property>
			<property>metrics/bw-ft</property>
			<property>fcs/aileron-deg</property>
			<table>
				<independentVar lookup="row">aero/alpha-deg-abs</independentVar>
				<tableData>
				    0    0.000448
				    5    0.000459
				    10   0.000431
				    15   0.000405
				    20   0.000379
				    25   0.000354
				    30   0.000312
				    35   0.000210
				    40   0.000105
				    45   0.000000
				    180  0.000000
				</tableData>
			</table>
		</product>
	</function>

	<!-- Reference: ADA101648, page 26 -->
	<function name="aero/coefficient/CR/CRDSP-L">
		<description>CRDSP (left spoiler position)</description>
		<product>
			<property>aero/qbar-psf</property>
			<property>metrics/Sw-sqft</property>
			<property>metrics/Sw-sqft</property>
			<property>fcs/spoiler-left-deg</property>
			<table>
				<independentVar lookup="row">aero/alpha-deg-abs</independentVar>
				<tableData>
				    0   -0.0000650
				    5   -0.0000700
				    10  -0.0000465
				    15  -0.0000330
				    20  -0.0000270
				    25  -0.0000200
				    30  -0.0000150
				    35  -0.0000100
				    40  -0.0000050
				    45  -0.0000000
				    180 -0.0000000
				</tableData>
			</table>
		</product>
	</function>

	<function name="aero/coefficient/CR/CRDSP-R">
		<description>CRDSP (right spoiler position)</description>
		<product>
			<property>aero/qbar-psf</property>
			<property>metrics/Sw-sqft</property>
			<property>metrics/Sw-sqft</property>
			<property>fcs/spoiler-right-deg</property>
			<table>
				<independentVar lookup="row">aero/alpha-deg-abs</independentVar>
				<tableData>
				    0   0.0000650
				    5   0.0000700
				    10  0.0000465
				    15  0.0000330
				    20  0.0000270
				    25  0.0000200
				    30  0.0000150
				    35  0.0000100
				    40  0.0000050
				    45  0.0000000
				    180 0.0000000
				</tableData>
			</table>
		</product>
	</function>

    <!-- Reference: ADA101648, page 26 -->
    <function name="aero/coefficient/CR/CRDR">
        <description>Roll moment due to rudder position</description>
        <product>
            <property>aero/qbar-psf</property>
            <property>metrics/Sw-sqft</property>
            <property>metrics/bw-ft</property>
	        <property>fcs/rudder-deg</property>
	        <table>
		        <independentVar lookup="row">aero/alpha-deg-abs</independentVar>
		        <tableData>
			    0    0.000199
			    5    0.000165
			    10   0.000135
			    15   0.000116
			    20   0.000092
			    25   0.000069
			    30   0.000052
			    35   0.000035
			    40   0.000017
			    45   0.000000
			    180  0.000000
		        </tableData>
	        </table>
        </product>
    </function>


    <!-- Pitch Moments -->

    <!-- Reference: ADA101648, page 26 -->
    <function name="aero/coefficient/CM/CM_BASIC">
       <description>Pitch moment due to alpha</description>
       <product>
           <property>aero/qbar-psf</property>
           <property>metrics/Sw-sqft</property>
           <property>metrics/cbarw-ft</property>
           <!-- <property>aero/alpha-deg</property> -->
           <ifthen>
             <!-- SGA -->
            <le> <p>aero/alpha-deg</p> <v> 0 </v> </le>
             <v> -1 </v>
             <v> 1 </v>
           </ifthen>
           <table>
               <independentVar lookup="row">aero/alpha-deg-abs</independentVar>
               <tableData>
                   0   0.000
                   5   -0.013
                   10  -0.027
                   15  -0.033
                   20  -0.050
                   25  -0.068
                   30  -0.093
                   35  -0.144
                   40  -0.196
                   45  -0.242
                   50  -0.263
                   55  -0.285
                   60  -0.318
                   65  -0.381
                   70  -0.430
                   75  -0.475
                   80  -0.501
                   85  -0.532
                   90  -0.571
                   95  -0.616
                   100 -0.658
                   105 -0.695
                   110 -0.729
                   180 -0.729
               </tableData>
           </table>
       </product>
    </function>

    <function name="aero/coefficient/CM/KB_CM_STAB">
      <description>correction factor for CM_STAB</description>
      <product>
        <property>aero/qbar-psf</property>
        <property>metrics/Sw-sqft</property>
        <property>metrics/cbarw-ft</property>
        <property>fcs/elevator-deg</property>
        <value>0.00011</value>
        <!--<abs>-->
          <property>aero/beta-deg-abs</property>
        <!--</abs>-->
      </product>
    </function>


    <!-- Reference: ADA101648, page 27 -->
    <function name="aero/coefficient/CM/CM_STAB">
       <description>Pitch moment due to elevator</description>
       <product>
          <property>aero/qbar-psf</property>
          <property>metrics/Sw-sqft</property>
          <property>metrics/cbarw-ft</property>
          <property>fcs/elevator-deg</property>
          <table>
            <independentVar lookup="row">aero/alpha-deg-abs</independentVar>
            <tableData>
                0   -0.01010
                5   -0.01004
                10  -0.00981
                15  -0.00926
                20  -0.00828
                25  -0.00745
                30  -0.00733
                35  -0.00677
                40  -0.00627
                45  -0.00572
                50  -0.00519
                55  -0.00466
                60  -0.00414
                65  -0.00361
                70  -0.00308
                75  -0.00256
                80  -0.00202
                85  -0.00150
                90  -0.00099
                95  -0.00052
                100  0.00000
                105  0.00000
                110  0.00000
                180  0.00000
            </tableData>
          </table>
       </product>
    </function>

    <!-- Reference: ADA101648, page 27 -->
    <function name="aero/coefficient/CM/CMQ">
       <description>Pitch moment due to pitch rate</description>
       <product>
           <property>aero/qbar-psf</property>
           <property>metrics/Sw-sqft</property>
           <property>metrics/cbarw-ft</property>
           <property>aero/ci2vel</property>
           <property>velocities/q-aero-rad_sec</property>
           <table>
               <independentVar lookup="row">aero/alpha-deg-abs</independentVar>
               <tableData>
                   0   -3.10
                   5   -3.41
                   10  -3.78
                   15  -3.92
                   20  -3.80
                   25  -3.62
                   30  -3.15
                   35  -3.15
                   40  -3.15
                   45  -3.15
                   180 -3.15
               </tableData>
           </table>
       </product>
    </function>

    <!-- Reference: ADA101648, page 27 -->
    <function name="aero/coefficient/CM/CMAD">
       <description>Pitch moment due to alpha rate</description>
       <product>
           <property>aero/qbar-psf</property>
           <property>metrics/Sw-sqft</property>
           <property>metrics/cbarw-ft</property>
           <property>aero/ci2vel</property>
           <property>aero/alphadot-rad_sec</property>
           <table>
               <independentVar lookup="row">aero/alpha-deg-abs</independentVar>
               <tableData>
                   0   -1.30
                   5   -1.42
                   10  -1.58
                   15  -1.63
                   20  -1.59
                   25  -1.52
                   30  -1.32
                   35  -1.32
                   40  -1.32
                   45  -1.32
                   180 -1.32
               </tableData>
           </table>
       </product>
    </function>

    <!-- Reference: ADA101648, page 27 -->
    <function name="aero/coefficient/CM/CMDA">
        <description>Pitch moment due to aileron position</description>
        <product>
          <property>aero/qbar-psf</property>
          <property>metrics/Sw-sqft</property>
          <property>metrics/cbarw-ft</property>
          <abs>
		        <property>fcs/aileron-deg</property>
          </abs>
          <table>
              <independentVar lookup="row">aero/alpha-deg-abs</independentVar>
              <tableData>
                  0   -0.00105
                  5   -0.00092
                  10  -0.00079
                  15  -0.00068
                  20  -0.00066
                  25  -0.00066
                  30  -0.00066
                  35  -0.00066
                  40  -0.00066
                  45  -0.00066
                  180 -0.00066
              </tableData>
          </table>
      </product>
  </function>

   <!-- Reference: ADA101648, page 27 -->
  <function name="aero/coefficient/CM/CMDSP">
      <description>Pitch moment due to spoiler position</description>
      <product>
          <property>aero/qbar-psf</property>
          <property>metrics/Sw-sqft</property>
          <property>metrics/cbarw-ft</property>
          <abs>
            <property>fcs/spoiler-deg</property>
          </abs>
          <table>
              <independentVar lookup="row">aero/alpha-deg-abs</independentVar>
              <tableData>
                  0   0.000130
                  5   0.000079
                  10  0.000035
                  15  0.000007
                  20  0.000000
                  25  0.000000
                  30  0.000000
                  35  0.000000
                  40  0.000000
                  45  0.000000
                  180 0.000000
              </tableData>
          </table>
      </product>
  </function>

  <!-- Reference: ADA101648, page 26 -->
    <function name="aero/coefficient/CM/DCM1">
        <description>delta pitch moment #1</description>
        <product>
                <property>aero/qbar-psf</property>
                <property>metrics/Sw-sqft</property>
                <property>metrics/cbarw-ft</property>
                <table>
                    <independentVar lookup="row">aero/alpha-deg-abs</independentVar>
                    <independentVar lookup="column">aero/beta-deg-abs</independentVar>
                    <tableData>
                               0       5     10         15      20        25       30    180
                        0  0.000  -0.0080   -0.0170   -0.0312  -0.0455  -0.0565  -0.0674 -0.0674
                        5  0.000  -0.0080   -0.0170   -0.0312  -0.0455  -0.0565  -0.0674 -0.0674
                        10 0.000  -0.0080   -0.0170   -0.0312  -0.0455  -0.0565  -0.0674 -0.0674
                        15 0.000  -0.0138   -0.0235   -0.0450  -0.0705  -0.0888  -0.1071 -0.1071
                        20 0.000  -0.0099   -0.0306   -0.0580  -0.0800  -0.1000  -0.1200 -0.1200
                        25 0.000   0.0018   -0.0204   -0.0465  -0.0768  -0.0953  -0.1138 -0.1138
                        30 0.000   0.0005   -0.0160   -0.0428  -0.0755  -0.0944  -0.1133 -0.1133
                        35 0.000   0.0000    0.0000   -0.0025  -0.0087  -0.0106  -0.0125 -0.0125
                        40 0.000   0.0000    0.0000    0.0000   0.0000   0.0000   0.0000  0.0000
                        45 0.000   0.0000    0.0000    0.0000   0.0000   0.0000   0.0000  0.0000
                       180 0.000   0.0000    0.0000    0.0000   0.0000   0.0000   0.0000 0.0000
                    </tableData>
                </table>
            </product>
        </function>

    <!-- Reference: ADA101648, page 26 -->
    <function name="aero/coefficient/CM/DCM2">
        <description>delta pitch moment #2</description>
        <product>
            <property>aero/qbar-psf</property>
            <property>metrics/Sw-sqft</property>
            <property>metrics/cbarw-ft</property>
            <table>
                <independentVar lookup="row">aero/alpha-deg-abs</independentVar>
                <independentVar lookup="column">aero/beta-deg-abs</independentVar>
                <tableData>
                             0       5     10         15      20        25       30    180
                        0  0.000  0.0080   0.0170   0.0312  0.0455  0.0565  0.0674  0.0674
                        5  0.000  0.0080   0.0170   0.0312  0.0455  0.0565  0.0674  0.0674
                        10 0.000  0.0080   0.0170   0.0312  0.0455  0.0565  0.0674  0.0674
                        15 0.000  0.0138   0.0235   0.0450  0.0705  0.0888  0.1071  0.1071
                        20 0.000  0.0099   0.0306   0.0580  0.0800  0.1000  0.1200  0.1200
                        25 0.000  -0.0018  0.0204   0.0465  0.0768  0.0953  0.1138  0.1138
                        30 0.000  -0.005   0.0160   0.0428  0.0755  0.0944  0.1133  0.1133
                        35 0.000   0.000   0.0000   0.0025  0.0087  0.0106  0.0125  0.0125
                        40 0.000   0.000   0.0000   0.0000  0.0000  0.0000  0.0000  0.0000
                        45 0.000   0.000   0.0000   0.0000  0.0000  0.0000  0.0000  0.0000
                        180 0.000   0.000  0.0000   0.0000   0.0000   0.0000   0.0000  0.0000
                </tableData>
            </table>
        </product>
    </function>


     <function name="aero/coefficient/CN/CNB1">
       <description>Yaw moment due to beta</description>
       <product>
           <property>aero/qbar-psf</property>
           <property>metrics/Sw-sqft</property>
           <property>metrics/bw-ft</property>
           <property>aero/beta-deg</property>
           <table>
               <independentVar>aero/alpha-deg-abs</independentVar>
               <tableData>
                   0   0.0022
                   5   0.0022
                   10  0.0021
                   15  0.0013
                   20 -0.0006
                   25 -0.0033
                   30 -0.0040
                   35 -0.0038
                   40 -0.0026
                   45 -0.0020
                   180 -0.0020
               </tableData>
           </table>
       </product>
    </function>

    <function name="aero/coefficient/CN/CNB2">
       <description>Yaw moment due to beta</description>
       <product>
           <property>aero/qbar-psf</property>
           <property>metrics/Sw-sqft</property>
           <property>metrics/bw-ft</property>
           <property>aero/beta-deg</property>
           <table>
               <independentVar>aero/alpha-deg-abs</independentVar>
               <tableData>
                   0   0.0022
                   5   0.0022
                   10  0.0021
                   15  0.0013
                   20  0.0000
                   25 -0.0005
                   30 -0.0008
                   35 -0.0011
                   40 -0.0014
                   45 -0.0017
                   180 -0.0017
               </tableData>
           </table>
       </product>
    </function>

    <!-- Reference: ADA101648, page 27 -->
    <function name="aero/coefficient/CN/CNR">
       <description>Yaw moment due to yaw rate</description>
       <product>
           <property>aero/qbar-psf</property>
           <property>metrics/Sw-sqft</property>
           <property>metrics/bw-ft</property>
           <property>aero/bi2vel</property>
           <property>velocities/r-aero-rad_sec</property>
           <table>
               <independentVar lookup="row">aero/alpha-deg-abs</independentVar>
               <tableData>
                   0   -0.375
                   5   -0.361
                   10  -0.361
                   15  -0.370
                   20  -0.502
                   25  -0.660
                   30  -0.560
                   35  -0.372
                   40  -0.190
                   45   0.000
                   180  0.000
               </tableData>
           </table>
       </product>
    </function>

    <!-- Reference: ADA101648, page 27 -->
    <function name="aero/coefficient/CN/CNP">
        <description>Yaw moment due to roll rate</description>
        <product>
            <property>aero/qbar-psf</property>
            <property>metrics/Sw-sqft</property>
            <property>metrics/bw-ft</property>
            <property>aero/bi2vel</property>
            <property>velocities/p-aero-rad_sec</property>
            <table>
                <independentVar lookup="row">aero/alpha-deg-abs</independentVar>
                <tableData>
                    0     0.005
                    5     -0.014
                    10    0.007
                    15    0.023
                    20    -0.002
                    25    0.055
                    30    0.122
                    35    0.080
                    40    0.041
                    45    0.000
                    180   0.000
                </tableData>
            </table>
        </product>
    </function>

     <!-- Reference: ADA101648, page 27 -->
    <function name="aero/coefficient/CN/CNDA">
        <description>Yaw moment due to aileron position</description>
        <product>
            <property>aero/qbar-psf</property>
            <property>metrics/Sw-sqft</property>
            <property>metrics/bw-ft</property>
            <property>fcs/aileron-deg</property>
            <table>
                <independentVar lookup="row">aero/alpha-deg-abs</independentVar>
                <tableData>
                    0   -0.000047
                    5   -0.000048
                    10  -0.000056
                    15  -0.000067
                    20  -0.000068
                    25  -0.000068
                    30  -0.000069
                    35  -0.000070
                    40  -0.000070
                    45  -0.000070
                    180 -0.000070
                </tableData>
            </table>
        </product>
    </function>

    <!-- Reference: ADA101648, page 27 -->
    <function name="aero/coefficient/CN/CNDR">
       <description>Yaw moment due to rudder position</description>
       <product>
           <property>aero/qbar-psf</property>
           <property>metrics/Sw-sqft</property>
           <property>metrics/bw-ft</property>
           <property>fcs/rudder-deg</property>
           <table>
               <independentVar lookup="row">aero/alpha-deg-abs</independentVar>
               <tableData>
                   0   0.00090
                   5   0.00086
                   10  0.00078
                   15  0.00073
                   20  0.00065
                   25  0.00050
                   30  0.00032
                   35  0.00023
                   40  0.00014
                   45  0.00000
                   180 0.00000
               </tableData>
           </table>
       </product>
    </function>

    <!-- Reference: ADA101648, page 27 -->
    <function name="aero/coefficient/CN/CNDSP">
	<description>Yaw moment due to spoiler position</description>
        <product>
            <property>aero/qbar-psf</property>
            <property>metrics/Sw-sqft</property>
            <property>metrics/bw-ft</property>
            <property>fcs/spoiler-deg</property>
            <table>
                <independentVar lookup="row">aero/alpha-deg-abs</independentVar>
                <tableData>
                    0    0.0000532
                    5    0.0000433
                    10   0.0000288
                    15   0.0000132
                    20   0.0000090
                    25   0.0000044
                    30   0.0000009
                    35   0.0000000
                    40   0.0000000
                    45   0.0000000
                    180  0.0000000
                </tableData>
            </table>
        </product>
    </function>


   <!-- Implements the Lift equations using the tables above -->
  <axis name="LIFT">

   <function name="aero/lift/total">
     <description>Total lift</description>
              <!-- If Alpha greater than or equal to 0 -->
      <sum>
          <property>aero/coefficient/CL/CL_BASIC</property>
          <property>aero/coefficient/CL/CL_STAB</property>
	  <property>aero/coefficient/CL/Lift_BLC</property>
	  <property>aero/coefficient/CL/Lift_Slats</property>
      </sum>
    </function>
  </axis>

  <axis name="DRAG">

      <function name="aero/drag/total">
          <description>total drag</description>
              <sum>
                  <property>aero/coefficient/CD/CD_BASIC</property>
                  <property>aero/coefficient/CD/CDM </property>
	          <property>aero/coefficient/CD/CDDF </property>

            <!-- Wave drag due to transonic/supersonic flow (empirical) -->
            <function name="aero/coefficient/CD/CD_WAVE">
              <description>Wave drag increment vs Mach</description>
              <product>
                <property>aero/qbar-psf</property>
                <property>metrics/Sw-sqft</property>
                <table>
                  <independentVar lookup="row">velocities/mach</independentVar>
                  <tableData>
                    0.70  0.000
                    0.75  0.000
                    0.80  0.002
                    0.85  0.006
                    0.90  0.015
                    0.95  0.035
                    1.00  0.080
                    1.20  0.150
                    1.60  0.250
                    2.00  0.400
                  </tableData>
                </table>
              </product>
            </function>
		  <property>aero/coefficient/CD/Drag_gear</property>
		  <property>aero/coefficient/CD/Drag_speedbrake</property>
		  <property>aero/coefficient/CD/Drag_Slats</property>
                    <property>aero/coefficient/CD/CD_Stores</property>
                    <property>aero/coefficient/CD/CD_WAVE</property>
              </sum>
          </function>
        </axis>

  <axis name="SIDE">
    <function name="aero/side/total">
          <description>Sideforce at less than absolute value Alpha 45</description>
          <sum>
                <product>
                    <property>aero/coefficient/CY/CYB</property>
                    <property>aero/beta-deg</property>
                </product>
                  <p> aero/coefficient/CY/CYDA </p>
                  <p> aero/coefficient/CY/CYDSP </p>
                  <p> aero/coefficient/CY/CYDR </p>
          </sum>
    </function>
  </axis>

  <axis name="ROLL">
    <function name="aero/roll/total">
      <description> roll less than or equal to ABS 45 AoA </description>
      <sum>
        <product>
          <p> aero/coefficient/CR/CRB1 </p>
          <p> aero/beta-deg </p>
        </product>
        <p> aero/coefficient/CR/CRP1 </p>
        <p> aero/coefficient/CR/CRR </p>
        <p> aero/coefficient/CR/CRDA </p>
        <p> aero/coefficient/CR/CRDSP-L </p>
        <p> aero/coefficient/CR/CRDSP-R </p>
        <p> aero/coefficient/CR/CRDR </p>
      </sum>
      </function>

    <!-- Compressibility / Prandtl-Glauert style correction (saturated to avoid singularity) -->
    <function name="aero/comp/pg">
      <description>Compressibility correction factor (empirical table). Values >1 increase effective lift/rotational terms near transonic.</description>
      <table>
        <independentVar lookup="row">velocities/mach</independentVar>
        <tableData>
          0.0  1.000
          0.6  1.020
          0.7  1.060
          0.75 1.120
          0.80 1.250
          0.85 1.600
          0.90 2.000
          0.95 2.800
          1.00 2.800
          1.20 2.500
          1.60 2.000
          2.00 1.800
        </tableData>
      </table>
    </function>

  </axis>

  <axis name="PITCH">

    <function name="aero/pitch/total">
      <description> total pitch </description>
      <sum>
        <p> aero/coefficient/CM/CM_BASIC </p>
        <p> aero/coefficient/CM/DCM1 </p>
        <p> aero/coefficient/CM/CM_STAB </p>
        <p> aero/coefficient/CM/KB_CM_STAB </p>
        <p> aero/coefficient/CM/CMDA </p>
        <p> aero/coefficient/CM/CMDSP </p>
        <p> aero/coefficient/CM/CMAD </p>
        <p> aero/coefficient/CM/CMQ </p>
      </sum>
    </function>

  </axis>

  <axis name="YAW">
    <function name="aero/yaw/total">
      <description> total yaw </description>
        <sum>
          <p> aero/coefficient/CN/CNB1 </p>
          <p> aero/coefficient/CN/CNP </p>
          <p> aero/coefficient/CN/CNR </p>
          <p> aero/coefficient/CN/CNDA </p>
          <p> aero/coefficient/CN/CNDR </p>
          <p> aero/coefficient/CN/CNDSP </p>
        </sum>
    </function>

  </axis>

 </aerodynamics>

 <external_reactions>
 </external_reactions>

</fdm_config>
